// SBML level 3 version 2
// Created with https://github.com/matthiaskoenig/sbmlutils.

model omeprazole_kidney(Vext, Vki, Vurine, omemets_ext, omemets_urine)
  // Model for omeprazole elimination in the kidneys
  // Model for renal excretion of omeprazole and omeprazole metabolites.
  // encoded in <a href="http://sbml.org">SBML</a> format.
  // Assumptions
  // only omeprazole metabolites are excreted, no omeprazole
  // direct excretion from plasma to urine (no processes in the kidneys)
  // Terms of use
  // The content of this model has been carefully created in a manual research effort. This file has been created by Matthias König using sbmlutils . For questions contact koenigmx@hu-berlin.de.
  // Copyright © 2021 Matthias König.
  // This work is licensed under a Creative Commons Attribution 4.0 International License.
  // Redistribution and use of any part of this model, with or without modification, are permitted provided that the following conditions are met:
  // Redistributions of this SBML file must retain the above copyright notice, this list of conditions and the following disclaimer.
  // Redistributions in a different form must reproduce the above copyright notice, this list of conditions and the following disclaimer in the documentation and/or other materials provided with the distribution.
  // This model is distributed in the hope that it will be useful, but WITHOUT ANY WARRANTY; without even the implied warranty of MERCHANTABILITY or FITNESS FOR A PARTICULAR PURPOSE.
  // model units - substance: mmole, time: min, volume: litre, area: m2, length: metre, extent: mmole

  // Compartments:
  compartment Vext = 4 litre; Vext is "plasma";  // SBO:0000290 ncit:C13356 BTO:0000131
  compartment Vki = 1.5 litre; Vki is "kidney";  // SBO:0000290 FMA:7203 BTO:0000671 ncit:C12415
  compartment Vurine = 1 litre;  // SBO:0000290 FMA:12274 ncit:C13283 BTO:0001419

  // Species:
  species omemets_ext in Vext = 0; omemets_ext is "omeprazole metabolites (plasma)";  // SBO:0000247; hasPart pubchem.compound:119560 inchikey:CMZHQFXXAAIBKE-UHFFFAOYSA-N pubchem.compound:145900 inchikey:IXEQEYRTSRFZEO-UHFFFAOYSA-N
  // Urinary species are in amounts.
  substanceOnly species omemets_urine in Vurine = 0; omemets_urine is "omeprazole metabolites (urine)";  // SBO:0000247; hasPart pubchem.compound:119560 inchikey:CMZHQFXXAAIBKE-UHFFFAOYSA-N pubchem.compound:145900 inchikey:IXEQEYRTSRFZEO-UHFFFAOYSA-N

  // Parameters:
  OMEMETSEX_k = 0.5974181 per_min; OMEMETSEX_k is "rate urinary excretion omeprazole metabolites";  // SBO:0000009

  // Reactions:
  OMEMETSEX: omemets_ext => omemets_urine; OMEMETSEX_k*Vki*omemets_ext; OMEMETSEX is "excretion omeprazole metabolites";  // SBO:0000655 ncit:C75913

  // Unit definitions:
  unit g_per_mole = gram / mole; g_per_mole is "g/mole";
  unit l_per_min = litre / (60 second); l_per_min is "l/min";
  unit l_per_min_mmole = litre / (60 second * 1e-3 mole); l_per_min_mmole is "l/min/mmole";
  unit m2 = metre^2; m2 is "meter^2";
  unit mM = 1e-3 mole / litre; mM is "mmole/liter";
  unit mg = 1e-3 gram;
  unit min = 60 second;
  unit mmole = 1e-3 mole;
  unit mmole_per_min = 1e-3 mole / (60 second); mmole_per_min is "mmole/min";
  unit mmole_per_min_l = 1e-3 mole / (60 second * litre); mmole_per_min_l is "mmole/min/liter";
  unit per_min = 1 / (60 second); per_min is "1/min";
end
