// SBML level 3 version 2
// Created with https://github.com/matthiaskoenig/sbmlutils.

model omeprazole_liver(Vext, Vli, ome_ext, omemets_ext)
  // Model for omeprazole metabolism in the liver
  // Omeprazole model of the liver
  // Model for hepatic conversion of omeprazole to omeprazole metabolites. encoded in SBML format.
  // Assumptions
  // omeprazole is only converted to omeprazole metabolites (combination of 5OH-omeprazole, omeprazole sulfone and 5OH-omeprazole sulfone).
  // irreversible transport and metabolism
  // The cytochrome isoforms CYP2C19 and CYP3A4 are responsible for the biotransformation of omeprazole into the two primary metabolites, 5-hydroxy omeprazole and omeprazole sulfone. The CYP isoforms were not modeled individually, but a single reaction was implemented.
  // Terms of use
  // The content of this model has been carefully created in a manual research effort. This file has been created by Matthias König using sbmlutils . For questions contact koenigmx@hu-berlin.de.
  // Copyright © 2021 Matthias König.
  // This work is licensed under a Creative Commons Attribution 4.0 International License.
  // Redistribution and use of any part of this model, with or without modification, are permitted provided that the following conditions are met:
  // Redistributions of this SBML file must retain the above copyright notice, this list of conditions and the following disclaimer.
  // Redistributions in a different form must reproduce the above copyright notice, this list of conditions and the following disclaimer in the documentation and/or other materials provided with the distribution.
  // This model is distributed in the hope that it will be useful, but WITHOUT ANY WARRANTY; without even the implied warranty of MERCHANTABILITY or FITNESS FOR A PARTICULAR PURPOSE.
  // model units - substance: mmole, time: min, volume: litre, area: m2, length: metre, extent: mmole

  // Compartments:
  compartment Vext = 4 litre; Vext is "plasma";  // SBO:0000290 ncit:C13356 BTO:0000131
  compartment Vli = 1.5 litre; Vli is "liver";  // SBO:0000290 FMA:7197 BTO:0000759 ncit:C12392

  // Species:
  species ome_ext in Vext = 0; ome_ext is "omeprazole (plasma)";  // SBO:0000247 pubchem.compound:4594 CHEBI:7772 ncit:C716; isVersionOf ncit:C29723 CHEBI:49200
  species omemets_ext in Vext = 0; omemets_ext is "omeprazole metabolites (plasma)";  // SBO:0000247; hasPart pubchem.compound:119560 inchikey:CMZHQFXXAAIBKE-UHFFFAOYSA-N pubchem.compound:145900 inchikey:IXEQEYRTSRFZEO-UHFFFAOYSA-N
  species ome in Vli = 0; ome is "omeprazole (liver)";  // SBO:0000247 pubchem.compound:4594 CHEBI:7772 ncit:C716; isVersionOf ncit:C29723 CHEBI:49200
  species omemets in Vli = 0; omemets is "omeprazole metabolites (liver)";  // SBO:0000247; hasPart pubchem.compound:119560 inchikey:CMZHQFXXAAIBKE-UHFFFAOYSA-N pubchem.compound:145900 inchikey:IXEQEYRTSRFZEO-UHFFFAOYSA-N

  // Parameters:
  OMEIM_Vmax = 0.0105988 mmole_per_min_l; OMEIM_Vmax is "Vmax omeprazole import";  // SBO:0000186
  OMEIM_Km_ome = 0.1 mM; OMEIM_Km_ome is "Km omeprazole import";  // SBO:0000322
  OMECYP_Vmax = 0.3380533 mmole_per_min_l; OMECYP_Vmax is "Vmax omeprazole conversion";  // SBO:0000186
  OMECYP_Km_ome = 0.1 mM; OMECYP_Km_ome is "Km omeprazole conversion";  // SBO:0000322
  OMEMETSEX_Vmax = 0.3212502 mmole_per_min_l; OMEMETSEX_Vmax is "Vmax omeprazole metabolite export";  // SBO:0000186
  OMEMETSEX_Km_omemets = 0.1 mM; OMEMETSEX_Km_omemets is "Km omeprazole metabolite export";  // SBO:0000027

  // Reactions:
  // Irreversible transport of omeprazole from plasma in the liver.
  OMEIM: ome_ext => ome; OMEIM_Vmax*Vli*ome_ext/(OMEIM_Km_ome + ome_ext); OMEIM is "omeprazole import";  // SBO:0000655
  // Represents CYP2C19 and CYP3A4.
  OMECYP: ome => omemets; OMECYP_Vmax*Vli*ome/(OMECYP_Km_ome + ome); OMECYP is "omeprazole metabolism (CYP)";  // SBO:0000176
  OMEMETSEX: omemets => omemets_ext; OMEMETSEX_Vmax*Vli*omemets/(OMEMETSEX_Km_omemets + omemets); OMEMETSEX is "omeprazole metabolite export";  // SBO:0000655

  // Unit definitions:
  unit g_per_mole = gram / mole; g_per_mole is "g/mole";
  unit l_per_min = litre / (60 second); l_per_min is "l/min";
  unit l_per_min_mmole = litre / (60 second * 1e-3 mole); l_per_min_mmole is "l/min/mmole";
  unit m2 = metre^2; m2 is "meter^2";
  unit mM = 1e-3 mole / litre; mM is "mmole/liter";
  unit mg = 1e-3 gram;
  unit min = 60 second;
  unit mmole = 1e-3 mole;
  unit mmole_per_min = 1e-3 mole / (60 second); mmole_per_min is "mmole/min";
  unit mmole_per_min_l = 1e-3 mole / (60 second * litre); mmole_per_min_l is "mmole/min/liter";
  unit per_min = 1 / (60 second); per_min is "1/min";
end
