// SBML level 3 version 2
// Created with https://github.com/matthiaskoenig/sbmlutils.

model omeprazole_stomach(pH, Vext, ome_ext, protons_stomach, protons_gacid)
  // Model for omeprazole in the stomach
  // Omeprazole model of the stomach
  // The model describes the change in stomach pH depending on omeprazole. A key component are the proton pumps in the parietal cells.
  // proton-pumps (PP) in gastric wall (gastric parietal cells, protein amount)
  // PP can be inhibited by omeprazole in the gastric wall; the activation processes from omeprazole to the active inhibitor in the gastric wall are not modeled in detail, but omeprazole was assumed to directly inhibit the PPs.
  // inhibition of PP converts the active in the inactive form
  // PP have a continuous turnover consisting of PP protein synthesis and PP degradation. The newly synthesized PP protein is active. Active and inactive PP are degraded identically.
  // pH in the stomach is modeled by calculating the amount of protons in the stomach.
  // PP (active) can secrete protons in the lumen (-> decrease pH)
  // only omeprazole, but not the omeprazole metabolites were assumed to have proton pump inhibitor (PPI) activity.
  // PP (active) + OME -> PP-OME (inactive)
  // --synthesis--> PP (active)
  // PP (active) --degradation-->
  // PP-OME (inactive) --degradation-->
  // omeprazole stability
  // omeprazole is unstable at low pH: omeprazole (stomach) -> and degraded in the stomach. This degradation is part of the whole-body model.
  // pH calculation
  // pH is calculated as decimal logarithm of reciprocal hydrogen ion activity pH = - log10 ([H+]). [H+] is in [mole/litre] = [mmole/litre] in stomach volume.
  // The normal stomach pH values are: pH=1-3
  // gastric acid secretion
  // A typical adult human stomach will secrete about 1.5 liters of gastric acid daily.
  // Stomach volume is around 100 [ml]
  // PP pump H+ into [gastric acid]; [gastric acid] --1.5 [l/day]--> [stomach (100[ml])] --1.5 [l/day]-->.
  // 1.5 [l/day] = 1.5 [l/day]/(24*60 [min/day])* 1000 [ml/l] = 1.04 [ml/min]
  // acid output basal: 4.3 [mmole (H+)/hr] placebo => 4.3 mmole/100 ml = 0.043 mmole/ml = 43 mole/litre (in 1 hr). Delta pH (1 hr) = - log10(43) = -1.63
  // stimulated (food stimulated): ~ 8 [mmole (H+)/hr] = 70-80 [mole/litre]. Delta pH (1 hr) = - log10(350) = -1.88
  // stimulated (pentagastrin): 35 [mmole (H+)/hr] = 350 [mole/litre]. Delta pH (1 hr) = - log10(350) = -2.54
  // Terms of use
  // The content of this model has been carefully created in a manual research effort. This file has been created by Matthias König using sbmlutils . For questions contact koenigmx@hu-berlin.de.
  // Copyright © 2021 Matthias König.
  // This work is licensed under a Creative Commons Attribution 4.0 International License.
  // Redistribution and use of any part of this model, with or without modification, are permitted provided that the following conditions are met:
  // Redistributions of this SBML file must retain the above copyright notice, this list of conditions and the following disclaimer.
  // Redistributions in a different form must reproduce the above copyright notice, this list of conditions and the following disclaimer in the documentation and/or other materials provided with the distribution.
  // This model is distributed in the hope that it will be useful, but WITHOUT ANY WARRANTY; without even the implied warranty of MERCHANTABILITY or FITNESS FOR A PARTICULAR PURPOSE.
  // model units - substance: mmole, time: min, volume: litre, area: m2, length: metre, extent: mmole

  // Compartments:
  compartment Vext = 4 litre; Vext is "plasma";  // SBO:0000290 ncit:C13356 BTO:0000131
  compartment Vpar = 1 litre; Vpar is "parietal cells";  // SBO:0000290 ncit:C12594
  // ~ 100 [ml]
  compartment Vstomach = 0.1 litre; Vstomach is "stomach (gastric fluid)";  // SBO:0000290 FMA:7148 ncit:C12391 UBERON:0000945
  // ~100 [ml]
  compartment Vgacid = 0.1 litre; Vgacid is "gastric acid";  // SBO:0000290 FMA:62972 ncit:C94192 omit:0006944

  // Species:
  species ome_ext in Vext = 0; ome_ext is "omeprazole (plasma)";  // SBO:0000247 pubchem.compound:4594 CHEBI:7772 ncit:C716; isVersionOf ncit:C29723 CHEBI:49200
  // Typical stomach pH of: pH = 1-3; pH=2.0 Calculation of proton concentration as:
  // pH = -log10(H+) => H+ = 10^-pH = 10^-2 = 0.01 [mole/litre] = 10 [mmole/l]
  // = 10 [mM]
  species protons_stomach in Vstomach = 10; protons_stomach is "H+ (stomach gastric fluid)";  // SBO:0000247 ncit:C17024 CHEBI:24636
  species protons_gacid in Vgacid = 10; protons_gacid is "H+ (gastric fluid)";  // SBO:0000247 ncit:C17024 CHEBI:24636
  substanceOnly species pp_active in Vpar = 1; pp_active is "proton pump (active)";  // substance in dimensionless; conversionFactor cf_species_dimensionless; SBO:0000245; isVersionOf omit:0017846
  substanceOnly species pp_inactive in Vpar = 0; pp_inactive is "proton pump (inactive)";  // substance in dimensionless; conversionFactor cf_species_dimensionless; SBO:0000245; isVersionOf omit:0017846

  // Parameters:
  pH has dimensionless; pH is "pH value stomach";  // SBO:0000002
  // gastric acid flow ~1.5 [l/day]
  Qgacid = 0.01 l_per_min; Qgacid is "gastric acid secretion";  // SBO:0000002 GO:0001696 ncit:C32661
  cf_species_dimensionless = 1 per_mmole; cf_species_dimensionless is "dimensionless species conversion";  // SBO:0000002
  pp_total has dimensionless; pp_total is "total proton pump";
  pp_rate_k = 0.1 mmole_per_min; pp_rate_k is "Rate of proton secretion";  // SBO:0000153
  ppi_k = 0.01 l_per_min; ppi_k is "Inhibition rate PP";  // SBO:0000153
  pp_synthesis_k = 0.01 mmole_per_min; pp_synthesis_k is "Synthesis rate PP";  // SBO:0000153
  pp_degradation_k = 0.01 mmole_per_min; pp_degradation_k is "Degradation rate PP";  // SBO:0000153

  // Assignment rules:
  pp_total := pp_active + pp_inactive;
  // pH calculation with conversion of stomach proton concentration: [mmole/l] -> [mole/l]
  pH := -log10(protons_stomach/(1000 mM));

  // Reactions:
  pp_rate: => protons_gacid; pp_rate_k*pp_active; pp_rate is "Proton secretion by proton pump";  // modifiers: pp_active; SBO:0000651
  gacid_secretion: protons_gacid => protons_stomach; Qgacid*protons_gacid; gacid_secretion is "Gastric acid secretion";  // SBO:0000651 GO:0001696
  gacid_loss: protons_stomach => ; Qgacid*protons_stomach; gacid_loss is "Gastric acid loss to intestine";  // SBO:0000651
  ppi: pp_active => pp_inactive; ppi_k*pp_active*ome_ext; ppi is "PP inhibition";  // modifiers: ome_ext; SBO:0000169
  // steady state
  // pp_synthesis = pp_active_degradation (with pp_active = 1 [dimensionless])
  // pp_synthesis_k = pp_degradation_k * pp_active
  // pp_active = pp_synthesis_k/pp_degradation_k
  pp_synthesis: => pp_active; pp_synthesis_k; pp_synthesis is "PP synthesis";  // SBO:0000651
  pp_active_degradation: pp_active => ; pp_degradation_k*pp_active; pp_active_degradation is "degradation PP active";  // SBO:0000651
  // Identical kinetics to degradation of active PP.
  pp_inactive_degradation: pp_inactive => ; pp_degradation_k*pp_inactive; pp_inactive_degradation is "degradation PP inactive";  // SBO:0000651

  // Unit definitions:
  unit g_per_mole = gram / mole; g_per_mole is "g/mole";
  unit l_per_min = litre / (60 second); l_per_min is "l/min";
  unit l_per_min_mmole = litre / (60 second * 1e-3 mole); l_per_min_mmole is "l/min/mmole";
  unit m2 = metre^2; m2 is "meter^2";
  unit mM = 1e-3 mole / litre; mM is "mmole/liter";
  unit mg = 1e-3 gram;
  unit min = 60 second;
  unit mmole = 1e-3 mole;
  unit mmole_per_min = 1e-3 mole / (60 second); mmole_per_min is "mmole/min";
  unit mmole_per_min_l = 1e-3 mole / (60 second * litre); mmole_per_min_l is "mmole/min/liter";
  unit per_min = 1 / (60 second); per_min is "1/min";
  unit per_mmole = 1 / (1e-3 mole); per_mmole is "1/mmole";
end
